# Enhedsdefinitioner
kJ := 1000 J
MJ := 1000 kJ
# Konstanter
λ_pla := 0.13 W/(m*K)
λ_luft := 25.50 mW/(m*K)
M_vand := 997 kg/m^3
c_vand := 4187 kJ/(kg*K)
# Variable parametre
l_pla := 5 mm
l_luft := 10 mm
H_tank := 100 mm
B_tank := 100 mm
L_tank := 100 mm
T_luft := 21 K
V_tank := H_tank*B_tank*L_tank = 1 L
OA_tank := H_tank*B_tank*2 + B_tank*L_tank*2 + L_tank*H_tank*2 = 0.06 m^2
U_pla := λ_pla/l_pla = 26 W/(m^2*K)
U_luft := λ_luft/l_luft = 2.55 W/(m^2*K)
U_tot := 1/(1/U_pla + 1/U_luft + 1/U_pla) = 2.13183 W/(m^2*K)
m_dej := V_tank*M_vand = 0.997 kg
Q_dej := m_dej*c_vand = 4.17444 MJ/K
ΔT(T_tank) := T_luft - T_tank
ϕ_tab(T_tank) := U_tot*OA_tank*ΔT(T_tank)
ϕ_peltier(T) := 40 W - 0.8*W/K*ΔT(T)
ϕ_tot(T_tank) := ϕ_tab(T_tank) - ϕ_peltier(T_tank)
ϕ_tot(T_tank) == 0 solve, T_tank → (1.34305466238*10^20*K^2*W - 1.16*10^21*K*W*K)/(6.39549839228*10^18*K*W + 4.0*10^19*W*K) = -22.1076 K
T_dej := T_luft = 21 K
ϕ_tot(T_dej(x - 1))/Q_dej
t := 1 s, 2 s .. 600 s
x := 1, 2 .. 50
ΔT_dej(T_dej) := ϕ_tot(T_dej)*1 s/Q_dej → -2.39553147141*10^-7*s*K*(40*W + 0.8*W*(T_dej - 21*K)/K + 0.127909967846*W*(T_dej - 21*K)/K)/J
T_dej := 1, 2 .. 600
