24 V*15 A = 360 W
'*24 V/(15 A) =  # error: This variable is undefined. Check that the label is set correctly.
5 V/(0.5 Ω) = 10 A
5 V/(300 Ω) = 16.6667 mA
1/(2*18 μs) = 27.7778 KHz
20 kHz = 20000 1/s
mintid := 18 μs
f := 20 kHz
T := 1/f = 50 μs
0.38*T = 19 μs  # Duty Cycle min 38%
f := 15 kHz
T := 1/f = 66.6667 μs
0.27*T = 18 μs  # Duty Cycle min 27%
f := 5 kHz
T := 1/f = 200 μs
0.09*T = 18 μs  # Duty Cycle min 9%
