ω_motor := 350
rps_motor := ω_motor/60 = 5.83333  # Gearing 2:1?
# Rounds per seconds:
n := 4
ω_pande := ω_motor/n = 87.5
rps_pande := ω_pande/60 = 1.45833
# Half-rounds per seconds:
rps_pande/2 = 0.729167
14200/250 = 56.8
# Moment:
0.062*14200 == T2*250 solve, T2 → 3.5216
