# Enhedsdefinitioner
mN := 1 N*10^-3
g := 1 kg*10^-3
# Pandens egenskaber
l_haandtag := 12 cm
m_pande := 0.939 kg
r_pande := 12.5 cm
t_svingtid := 1 s
A_pande := r_pande^2*π = 0.0490874 m^2
τ_datablad := 498.2 mN*m
# Inertimoment for skive, med rotationsakse gennem centrum
I_0pande := 1/3*m_pande*r_pande^2 = 0.00489062 kg*m^2
# Steiners sætning til lineær forskydning af inertimoment
I_pande := I_0pande + m_pande*(r_pande + l_haandtag)^2 = 0.0612541 kg*m^2
# Vinkelhastighed antagende bevægelsen er en halvcirkel
ω_gns := π/t_svingtid = 3.14159 1/s
# Maksimal vinkelhastighed antagende at der er konstant acceleration til konstant deccelation
ω_peak := ω_gns*2 = 6.28319 1/s
# Konstante acceleration
α_gns := ω_peak/(t_svingtid/2) = 12.5664 1/s^2
# Nødvendig omrejningsmoment for motoren
τ := I_pande*α_gns = 0.769742 N*m
τ = 769.742 mN*m
τ_datablad - τ = -271.542 mN*m
# Motor fra elektronik-lavpris databladet (ingen ved hvilken er den korrekte motor) udfra current på 6.49A er det et godt bud.
RS550SF_6035 := 450 g*cm = 0.0045 kg*m
RS550SF_6035 := 0.005 kg*m^2
RS550SF_6035*12.566*1/s^2 = 62.83 mN*m
# Med gearing:
0.062 N*m*14200 == T2*250 solve, T2 → 3.5216*N*m
Amazon := 498 mN*m
# Med gearing:
0.498 N*m*19300 == T2*250 solve, T2 → 38.4456*N*m
