# Forhold mellem ζ og OS
C_max(ζ) := 1 + e^(-(ζ*π/sqrt(1 - ζ^2)))
# Finder ζ for 1%
res := 1 + e^(-(ζ*π/sqrt(1 - ζ^2))) == 1.01 solve, ζ → [-0.826085054614; 0.826085054614]
ζ := res[1, 0]
ζ = 0.826085
# Forhold mellem fasemargin og ζ
φ_m(ζ) := atan(2*ζ/(-2*ζ^2 + (1 + 4*ζ^4)^(1/2))^(1/2))
# Finder fasemargin (I grader):
φ_m(ζ)*1/deg = 70.9048
ω_BWT_s(ζ) := 4/ζ*sqrt((1 - 2*ζ^2) + sqrt(4*ζ^4 - 4*ζ^2 + 2))
ω_BWT_s(ζ) = 4.05016
T_s := 10*60
ω_BW := ω_BWT_s(ζ)/T_s = 0.00675027
